<?xml version="1.0" ?>
<Node name="root" dt="0.001" gravity="0 0 0" >
    <RequiredPlugin name="Geomagic"/>
    <RequiredPlugin name="Sofa.Component.AnimationLoop"/>
    <RequiredPlugin name="Sofa.Component.Collision.Detection.Algorithm"/>
    <RequiredPlugin name="Sofa.Component.Collision.Detection.Intersection"/>
    <RequiredPlugin name="Sofa.Component.Collision.Geometry"/>
    <RequiredPlugin name="Sofa.Component.Collision.Response.Contact"/>
    <RequiredPlugin name="Sofa.Component.Constraint.Lagrangian.Correction"/>
    <RequiredPlugin name="Sofa.Component.Constraint.Lagrangian.Solver"/>
    <RequiredPlugin name="Sofa.Component.Constraint.Projective"/>
    <RequiredPlugin name="Sofa.Component.Controller"/>
    <RequiredPlugin name="Sofa.Component.Haptics"/>
    <RequiredPlugin name="Sofa.Component.IO.Mesh"/>
    <RequiredPlugin name="Sofa.Component.LinearSolver.Iterative"/>
    <RequiredPlugin name="Sofa.Component.Mapping.Linear"/>
    <RequiredPlugin name="Sofa.Component.Mapping.NonLinear"/>
    <RequiredPlugin name="Sofa.Component.Mass"/>
    <RequiredPlugin name="Sofa.Component.ODESolver.Backward"/>
    <RequiredPlugin name="Sofa.Component.SolidMechanics.FEM.Elastic"/>
    <RequiredPlugin name="Sofa.Component.SolidMechanics.Spring"/>
    <RequiredPlugin name="Sofa.Component.StateContainer"/>
    <RequiredPlugin name="Sofa.Component.Topology.Container.Constant"/>
    <RequiredPlugin name="Sofa.Component.Topology.Container.Dynamic"/>
    <RequiredPlugin name="Sofa.Component.Topology.Mapping"/>
    <RequiredPlugin name="Sofa.Component.Visual"/>
    <RequiredPlugin name="Sofa.GL.Component.Rendering3D"/>

    <VisualStyle displayFlags="hideBehaviorModels hideCollisionModels hideMappings hideForceFields" />
    <DefaultVisualManagerLoop />
    <CollisionPipeline name="pipeline" depth="6" verbose="0"/>
    <BruteForceBroadPhase/>
    <BVHNarrowPhase/>
    <CollisionResponse name="response" response="FrictionContactConstraint" />
    <LocalMinDistance name="proximity" alarmDistance="0.15" contactDistance="0.05" angleCone="0.0" />
    <FreeMotionAnimationLoop/>
    <LCPConstraintSolver tolerance="0.001" maxIt="1000"/>
    <GeomagicDriver name="GeomagicDevice" deviceName="Default Device" scale="1" drawDeviceFrame="1" positionBase="0 0 0" drawDevice="0" orientationBase="0 0.707 0 -0.707"
        replayFile="/home/yogyaahuja/sofa/pinn_project/data/training_data.csv"
        replayOutput="/home/yogyaahuja/sofa/pinn_project/data/replay_pinn_forces.csv" />

    <Node name="Liver" gravity="0 -9.81 0">
        <EulerImplicitSolver name="cg_odesolver" rayleighStiffness="0.1" rayleighMass="0.1" />
        <CGLinearSolver name="cg_solver" iterations="25" tolerance="1e-09" threshold="1e-09" />
        <MeshGmshLoader name="meshLoader" filename="mesh/liver_reduced_50pct.msh" />
        <TetrahedronSetTopologyContainer name="topo" src="@meshLoader" />

        <MechanicalObject name="liverDofs" src="@meshLoader" template="Vec3d" />

        <TetrahedronSetGeometryAlgorithms template="Vec3d" name="GeomAlgo" />
        <DiagonalMass name="mass" massDensity="1" topology="@topo" geometryState="@liverDofs"/>
        <TetrahedronFEMForceField template="Vec3d" name="FEM" method="large" poissonRatio="0.45" youngModulus="500" computeGlobalMatrix="0" />
        <PrecomputedConstraintCorrection recompute="false"
            fileCompliance="/home/yogyaahuja/sofa/share/Liver-543-0.001.comp"/>

        <FixedConstraint name="FixedConstraint" indices="0 20 180 3 39 64" />


        <Node name="Visu" tags="Visual" gravity="0 -9.81 0">
            <MeshOBJLoader name="meshLoader_2" filename="mesh/liver_light_jms.obj" handleSeams="1" />
            <OglModel name="VisualModel" src="@meshLoader_2" />
            <BarycentricMapping name="visual mapping" input="@../liverDofs" output="@VisualModel" />
        </Node>

        <Node name="Surf" gravity="0 -9.81 0">
            <TriangleSetTopologyContainer name="surfTopo" />
            <TriangleSetTopologyModifier name="surfModifier" />
            <TriangleSetGeometryAlgorithms name="surfGeomAlgo" template="Vec3d" />
            <Tetra2TriangleTopologicalMapping input="@../topo" output="@surfTopo" />
            <MechanicalObject name="surfDofs" template="Vec3d" src="@../meshLoader" />
            <TriangleCollisionModel name="TriangleCollision" />
            <LineCollisionModel name="LineCollision" />
            <PointCollisionModel name="PointCollision" />
            <IdentityMapping input="@../liverDofs" output="@surfDofs" />
        </Node>
    </Node>

    <Node name="Omni">
        <MechanicalObject template="Rigid3d" name="DOFs" position="@GeomagicDevice.positionDevice"/>
        <MechanicalStateController template="Rigid3d" listening="true" mainDirection="-1.0 0.0 0.0" handleEventTriggersUpdate="true"/>
        <Node name="VisuAvatar" activated="false" >
            <MeshOBJLoader name="meshLoader_0" filename="mesh/sphere.obj" scale="0.1" handleSeams="1" />
            <OglModel name="Visual" src="@meshLoader_0" color="gray"/>
            <RigidMapping input="@.." output="@Visual" index="0"/>
        </Node>
        <Node name="RefModel">
            <MeshOBJLoader filename="Demos/Dentistry/data/mesh/dental_instrument_centerline.obj" name="loader"/>
            <MeshTopology src="@loader" />
            <MechanicalObject src="@loader" name="instrumentRefState1" ry="-180" rz="-90" dz="3.5" dx="-0.3" />
            <RigidMapping />
        </Node>
        <Node name="RefModelRight" >
            <MeshOBJLoader filename="Demos/Dentistry/data/mesh/dental_instrument_centerline.obj" name="loader"/>
            <MeshTopology src="@loader" />
            <MechanicalObject src="@loader" name="instrumentRefState2" ry="-180" rz="-90" dz="3.5" dx="-0.3" dy="0.5" />
            <RigidMapping />
        </Node>
        <Node name="RefModelLeft" >
            <MeshOBJLoader filename="Demos/Dentistry/data/mesh/dental_instrument_centerline.obj" name="loader"/>
            <MeshTopology src="@loader" />
            <MechanicalObject src="@loader" name="instrumentRefState3" ry="-180" rz="-90" dz="3.5" dx="-0.3" dy="-0.5" />
            <RigidMapping />
        </Node>
    </Node>

    <Node name="Instrument" >
        <EulerImplicitSolver name="ODE solver" rayleighStiffness="0.05" rayleighMass="1.0" />
        <CGLinearSolver name="linear solver" iterations="25" tolerance="1e-10" threshold="10e-10" />
        <!-- Start at first replay CSV position (0.76371 5.97317 -2.10327) so the VectorSpringForceField
             has zero extension at t=0. Without this, the instrument flies from SOFA origin through
             the liver to reach the replay start position, causing deep LCP constraint penetration and divergence. -->
        <MechanicalObject name="instrumentState" template="Rigid3d"
            position="0.76371 5.97317 -2.10327 0 0 0 1" />
        <UniformMass name="mass" totalMass="0.5" />

        <LCPForceFeedback name="forceFeedback" activate="true" forceCoef="0.1"/>

        <UncoupledConstraintCorrection/>

        <Node name="VisualModel" >
            <MeshOBJLoader name="meshLoader_1" filename="Demos/Dentistry/data/mesh/dental_instrument.obj" handleSeams="1" />
            <OglModel name="InstrumentVisualModel" src="@meshLoader_1" color="1.0 0.2 0.2 1.0" ry="-180" rz="-90" dz="3.5" dx="-0.3"/>
            <RigidMapping name="MM->VM mapping" input="@instrumentState" output="@InstrumentVisualModel" />
        </Node>

        <Node name="CollisionModel" >
            <MeshOBJLoader filename="Demos/Dentistry/data/mesh/dental_instrument_centerline.obj" name="loader"/>
            <MeshTopology src="@loader" />
            <MechanicalObject src="@loader" name="instrumentCollisionState1" ry="-180" rz="-90" dz="3.5" dx="-0.3" />
            <LineCollisionModel contactStiffness="10" />
            <PointCollisionModel contactStiffness="10" />
            <RigidMapping name="MM->CM mapping" input="@instrumentState" output="@instrumentCollisionState1" />
        </Node>

        <Node name="RefModelRight" >
            <MeshOBJLoader filename="Demos/Dentistry/data/mesh/dental_instrument_centerline.obj" name="loader"/>
            <MeshTopology src="@loader" />
            <MechanicalObject src="@loader" name="instrumentCollisionState2" ry="-180" rz="-90" dz="3.5" dx="-0.3" dy="0.5" />
            <RigidMapping name="MM->CM mapping" input="@instrumentState" output="@instrumentCollisionState2" />
        </Node>

        <Node name="RefModelLeft" >
            <MeshOBJLoader filename="Demos/Dentistry/data/mesh/dental_instrument_centerline.obj" name="loader"/>
            <MeshTopology src="@loader" />
            <MechanicalObject src="@loader" name="instrumentCollisionState3" ry="-180" rz="-90" dz="3.5" dx="-0.3" dy="-0.5" />
            <RigidMapping name="MM->CM mapping" input="@instrumentState" output="@instrumentCollisionState3" />
        </Node>

        <VectorSpringForceField template="Vec3d" object1="@Omni/RefModel/instrumentRefState1" object2="@Instrument/CollisionModel/instrumentCollisionState1" stiffness="10" viscosity="10" />
        <VectorSpringForceField template="Vec3d" object1="@Omni/RefModelRight/instrumentRefState2" object2="@Instrument/RefModelRight/instrumentCollisionState2" stiffness="10" viscosity="10" />
        <VectorSpringForceField template="Vec3d" object1="@Omni/RefModelLeft/instrumentRefState3" object2="@Instrument/RefModelLeft/instrumentCollisionState3" stiffness="10" viscosity="10" />
    </Node>

</Node>
